units metal
boundary p p p
box tilt large
atom_style atomic
read_data InSe_unit_relaxed.data
pair_style tersoff
pair_coeff * * InSe.tersoff In Se
neighbor 2.0 bin
neigh_modify delay 0 every 1 check yes
